# ТЕМА:  Расчет коэффициентов одномерных регрессионных моделей (эмпирических формул)  методом наименьших квадратов (МНК)
# ЦЕЛЬ РАБОТЫ:  Определить коэффициенты эмпирических формул по МНК
#
# ЗАДАНИЕ:
# 1. Ввести исходные данные в виде матрицы, используя которую построить график - объемную гистограмму.  Провести визуальный анализ на возможный вид зависимости между величинами X и Y.
# 2. Подготовить векторы X и Y для расчета коэффициентов одномерных моделей.
# 3. Рассчитать коэффициенты  линейной эмпирической формулы
# y=a0+a1*x
# a) по МНК,
# б) используя встроенные фунцкии MathCAD  (slope(), intercept()).
# 4. Рассчитать по МНК коэффициенты  нелинейной эмпирической формулы
# y=a0+a1*x+a2*x**2.
# 5. Рассчитать по МНК коэффициенты  линейной эмпирической формулы
# y=a0+a1*f(x)
# 6. Провести линеаризацию исходной нелинейной функции y=F(x,a0,a1),
# приведя ее к виду  z=a0+a1*f(t).
# Рассчитать коэффициенты  линейной эмпирической формулы
# z=a0+a1*f(t).
# Подставить рассчитанные коэффициенты в исходную функцию.
# 7. Провести анализ качества приближения по остаточной сумме. Сделать вывод о том, какая из использованных функций является наилучшей.
# Примечание:
# Для каждого шага 2-6 задания :
# 1.Вывести таблицу зависимости функции от x ( таблица табуляции).
# В качестве точек для таблицы взять точки X  из выборки.
# 2.Построить графики двух таблиц (исходной и табулированной).
# 1. Ввод исходных данных вариант №  и построение графика
# X \ Y  11  13  15  17  19  21
# 4  2  1  0  0  0  0
# 5  0  1  2  0  0  0
# 6  0  0  0  2  3  0
# 7  0  0  0  0  1  2
R := [2, 1, 0, 0, 0, 0; 0, 1, 2, 0, 0, 0; 0, 0, 0, 2, 3, 0; 0, 0, 0, 0, 1, 2]
# Например, пара значений X=4, Y=11 встречалась в опытах 2 раза,
# пара значений X=5, Y=11 не встретилась ни разу и т. д.
# Матрица R показывает, как часто разные пары значений X, Y встречались в опытах.
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# 2. Ввод  X и Y
# (с учетом повторных значений X, Y)
X := [4; 4; 4; 5; 5; 5; 6; 6; 6; 6; 6; 7; 7; 7]
Y := [11; 11; 13; 13; 15; 15; 17; 17; 19; 19; 19; 19; 21; 21]
# 3. Расчет коэффициентов линейного уравнения y=a0+a1*x
# а) по  МНК
k := 0 .. 13
E[k] := 1  # Создание вектора из 14 элементов, равных 1
l := 0 .. 1
XX[k, l] := 0  # Создание  матрицы
XX[:, 0] := E
XX[:, 1] := X  # Подготовка матрицы исходных данных
# Информационная матрица
F := transpose(XX)*XX
|F| = 216
XX = [1, 4; 1, 4; 1, 4; 1, 5; 1, 5; 1, 5; 1, 6; 1, 6; 1, 6; 1, 6; 1, 6; 1, 7; 1, 7; 1, 7]
# Детерминант информационной матрицы
# должен быть ненулевым (т.е., матрица F - неособенная)
F = [14, 78; 78, 450]
# XX - матрица исходных данных (1-й столбец - единицы, 2-й столбец - значения X с учетом повторов этих значений в экспериментальных данных)
A1 := F^-1*(transpose(XX)*Y)
A1 = [-0.388889; 3.01852]  # Расчет коэффициентов линейной модели
y1(x) := A1[0] + A1[1]*x
Y1[k] := y1(X[k])
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# Y_k - опытные данные
# Y1_k - аппроксимация по МНК с помощью линейной функции (линейная регрессия)
# б) Расчет коэффициентов линейной модели
# с помощью встроенных функций Mathcad
a0 := intercept(X, Y)
a0 = -0.388889  # Коэффициенты -2
a1 := slope(X, Y)
a1 = 3.01852
A1 = [-0.388889; 3.01852]  # Коэффициенты -1
# 4. Расчет коэффициентов нелинейной (полиномиальной) функции
# (в данном случае квадратичной)
l := 0 .. 2
XX[k, l] := 0
X2[k] := X[k]^2
XX[:, 0] := E
XX[:, 1] := X
XX[:, 2] := X2
# Информационная матрица
F := transpose(XX)*XX
|F| = 2952
XX = [
    1, 4, 16;
    1, 4, 16;
    1, 4, 16;
    1, 5, 25;
    1, 5, 25;
    1, 5, 25;
    1, 6, 36;
    1, 6, 36;
    1, 6, 36;
    1, 6, 36;
    1, 6, 36;
    1, 7, 49;
    1, 7, 49;
    1, 7, 49
]
# XX - матрица исходных данных (1-й столбец - единицы, 2-й столбец - значения X с учетом повторов этих значений в экспериментальных данных, 3-й столбец - квадраты соответствующих значений из 2-го столбца)
# Расчет коэффициентов нелинейной (квадратичной) модели
A2 := F^-1*transpose(XX)*Y
A2 = [-5.78049; 5.06504; -0.186992]
y2(x) := A2[0] + A2[1]*x + A2[2]*x^2
Y2[k] := y2(X[k])
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# Y_k - опытные данные
# Y1_k - аппроксимация по МНК с помощью линейной функции (линейная регрессия)
# Y2_k - аппроксимация по МНК с помощью квадратичной функции (нелинейная регрессия)
# Вывод: трудно выделить, какая из функций более подходит в качестве эмпирической формулы (лучше описывает опытные данные).
# 5.  Расcчитаем коэффициенты для функции y=a0+a1*sqrt(x)
l := 0 .. 1
XX := 0
XX[k, l] := 0  # Создание  матрицы
X1[k] := sqrt(X[k])
XX[:, 0] := E
XX[:, 1] := X1  # Подготовка матрицы исходных данных
# Информационная матрица
F := transpose(XX)*XX
|F| = 10.0567
XX = [
    1, 2;
    1, 2;
    1, 2;
    1, 2.23607;
    1, 2.23607;
    1, 2.23607;
    1, 2.44949;
    1, 2.44949;
    1, 2.44949;
    1, 2.44949;
    1, 2.44949;
    1, 2.64575;
    1, 2.64575;
    1, 2.64575
]
# XX - матрица исходных данных (1-й столбец - единицы, 2-й столбец - корень квадратный из значений X с учетом повторов этих значений в экспериментальных данных)
A3 := F^-1*(transpose(XX)*Y)
A3 = [-16.4812; 14.0072]  # Расчет коэффициентов нелинейной (с корнем квадратным) модели
y3(x) := A3[0] + A3[1]*sqrt(x)
Y3[k] := y3(X[k])
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# Y_k - опытные данные
# Y1_k - аппроксимация по МНК с помощью линейной функции (линейная регрессия)
# Y2_k - аппроксимация по МНК с помощью квадратичной функции (нелинейная регрессия)
# Y3_k - аппроксимация по МНК с помощью функции с корнем квадратным (нелинейная регрессия)
# Вывод: функции y1=a0+a1*x, y=a0+a1*x+a2*x**2  и  y3=a0+a1*sqrt(x)  по степени приближения практически одинаковы (судя по графикам)
# 6. Линеаризация функции y=a0*exp(a1*x).
#
# Приводим заданную функцию к виду  z(x) = ln(y) = ln(a0)+a1*x = b0+ a1*x  и ищем коэффициенты  для линейного уравнения z = b0+a1*x (сводим заменой переменной y экспоненциальную функцию y(x) к линейной функции z(x), коэффициенты которой (b0  и a1) находим, как рассмотрено выше; затем находим коэффициент a0: ln(a0) = b0 => a0 = exp(b0) ).
Z[k] := ln(Y[k])  # Подготовка матрицы исходных данных
l := 0 .. 1
XX := 0
XX[k, l] := 0
XX[:, 0] := E
XX[:, 1] := X
F := transpose(XX)*XX
|F| = 216  # Информационная матрица
A4 := F^-1*(transpose(XX)*Z)
A4 = [1.69646; 0.193905]  # Расчет коэффициентов линейной модели z(x)
y4(x) := exp(A4[0])*exp(A4[1]*x)
Y4[k] := y4(X[k])  # Возврат к нелинейной (экспоненциальной) модели y(x)
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# Y_k - опытные данные
# Y1_k - аппроксимация по МНК с помощью линейной функции (линейная регрессия)
# Y2_k - аппроксимация по МНК с помощью квадратичной функции (нелинейная регрессия)
# Y3_k - аппроксимация по МНК с помощью функции с корнем квадратным (нелинейная регрессия)
# Y4_k - аппроксимация по МНК с помощью экспоненциальной функции (нелинейная регрессия)
# 7. Анализ качества  приближения по остаточной сумме
S1 := sum((Y[k] - Y1[k])^2, k)
S1 = 14.8519
S2 := sum((Y[k] - Y2[k])^2, k)
S2 = 14.374
S3 := sum((Y[k] - Y3[k])^2, k)
S3 = 14.4904
S4 := sum((Y[k] - Y4[k])^2, k)
S4 = 17.8763
# Выводы по выбору наилучшей формулы при аппроксимации заданных эмпирических  данных по МНК:
# 1.  Наилучшей приближающей функцией для заданных опытных данных является полином второго порядка  y=a0+a1*x+a2*x**2.
# 2. Второй по качеству приближения  -  y=a0+a1*sqrt(x).
# 3. Третьей по качеству приближения  -  y=a0+a1*x, а на последнем месте (наиболее худшей) - экспоненциальная функция.
