# Примеры расчетов в пакете Mathcad
# Численное решение уравнения  x^3=e^x  (с помощью функции root)
x := 3  # Выбор начального приближения, влияет на корень, если их несколько
a := root(x^3 - e^x, x)
a = 1.85718  # Решение, полученное при заданном начальном приближении
1.857^3 - e^1.857 = -0.000724646  # Проверка
# Графическое нахождение корня (еще один способ проверки)
t := -5, -4.9 .. 5  # Задаем дискретную переменную t (вместо х), которая изменяется от -5 до 5 с шагом 0.1
t = [
    -5; -4.9; -4.8; -4.7; -4.6; -4.5; -4.4; -4.3; -4.2; -4.1
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]
# Задаем функцию, соответствующую решаемому уравнению и строим график:
y(t) := t^3 - e^t
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# Из графика видно, что есть еще один корень (около 5) - его можно найти, задав другое начальное приближение
# Численное решение полиномиального уравнения (с помощью функции polyroots)
#
# Пусть требуется решить уравнение x^4+2x^3-3x^2+4x-5=0
# Аргумент функции polyroots -
# вектор из коэффициентов полинома,
# начиная с коэффициента при самой младшей (нулевой) степени
#
# В данном случае возвращается 4 корня уравнения, из которых 2 - действительные, а 2 комплексно сопряженные
polyroots([-5; 4; -3; 2; 1]) = [-3.37192; 0.130817 - 1.14823i; 0.130817 + 1.14823i; 1.11029]
# Проверка для 2-го корня
(0.131 - 1.148*1i)^4 + 2*(0.131 - 1.148*1i)^3 - 3*(0.131 - 1.148*1i)^2 + 4*(0.131 - 1.148*1i) - 5 = -0.00368121 + 0.000495169i
# Символьное решение уравнения
d*x + b == c  # Чтобы набрать =, нажимаем Сtrl=
((-b) + c)/d  # Щелкнуть по x и выбрать команду  Solve for Variable из меню Symbolic
# Проверка в символьном виде (стрелка - символьный знак равенства - вызывается сочетанием клавиш Ctrl .)
d*(-(b - c)/d) + b → c
# Численное решение системы уравнений с помощью блока решения
x := 1
y := 1  # Выбор начальных  приближений
Given
2*x + 3*y == 5  # Чтобы набрать =, нажимаем Сtrl=
x + y == 1
# Нажать кнопку "Матрица или вектор", ввести установки: 2 ряда, 1 колонка
[xval; yval] := Find(x, y)
xval = -2  # Чтобы набрать =, нажимаем обычное =
yval = 3  # Проверка в численном виде
2*xval + 3*yval = 5
xval + yval = 1
# Символьное решение системы уравнений с помощью блока решения
Given
2*z + 3*p == a1  # Чтобы набрать =, нажимаем Сtrl=
z - p == b1
# Аргументами функции Find являются переменные, относительно которых решается система. После ввода Find(z,p), нажать [Ctrl]. (Ctrl с точкой), затем для получения результата щелкнуть ЛКМ на функции Find
Find(z, p) → [3/5*b1 + 1/5*a1; -2/5*b1 + 1/5*a1]
# Проверка в символьном виде
2*(3/5*b1 + 1/5*a1) + 3*(-2/5*b1 + 1/5*a1) → a1
(3/5*b1 + 1/5*a1) - (-2/5*b1 + 1/5*a1) → b1
# Суммы и произведения
i := 1, 3 .. 9
S[i] := i^2
sum(S[i], i) = 165
product(S[i], i) = 893025
S[i] = [1; 9; 25; 49; 81]
x := 0.1, 0.2 .. 1
y := 0.2, 0.4 .. 3
sum(sum(x/y, y), x) + 10 = 101.251
product(k - 2, k = 3 .. 15) = 6227020800
# Производные в точках и определенные интегралы
x := 1
y := 2
z := 3
H(t) := t^2 + 1
d/dz(H(z)) = 6
G(x, y) := (x + y)^3
d/dx(G(x, y)) + d^2/dy^2(G(x, y)) = 45
integral(integral(G(x, y), x = x + y .. x*y), y = 0 .. 1) = -5.25
integral(H(t), t = y .. z) = 7.33333
p := 1, 1.2 .. 2
integral(H(t), t = 0 .. p) = [1.33333; 1.776; 2.31467; 2.96533; 3.744; 4.66667]
