# Часть 1
# Работа с графиками и матрицами в пакете Mathcad
#
# Задания:
#
# 1. Построить декартовы графики функций
# Построить 3 графика:
# 2 графика для функций - подынтегрального выражения и производной из Лаб. работы 1 (по одной кривой на 1-м графике);
# 1 график - две кривых вместе.
# Подобрать пределы значений и шаг по осям x, y для отображения всех кривых.
#
# 2. Построить графики функции 2-х переменнных
#
# f(x,y)=N_1x^2+N_2y^2
#
# где N_1 и N_2  - числа букв в имени и фамилии студента.
#
# 2.1. Построить график поверхности.
#
# 2.2. Построить объемную гистограмму.
#
# Необходимые параметры задать самостоятельно.
#
# 3. Работа с векторами и матрицами.
#
# 3.1. Создать 2 вектора p, q (каждый из 3-х элементов) и 2  матрицы C, D (размером 3Х3).
#
# 3.2. Найти
# p+q, p-q (сумму и разность векторов),
# p*q (скалярное произведение векторов, команда *),
# pxq (векторное произведение векторов, команда Ctrl+8),
# /p/, /q/ (модули векторов).
#
# 3.3. Найти
# C+D, C-D (сумму и разность матриц),
# С*p (произведение матрицы на вектор, команда *),
# С*D (произведение матриц, команда *),
# /C/, /D/ (определители матриц),
# C^T , D^T (транспонированные матрицы, команда Ctrl+1),
# С^(<0>), D^(<1>)  (извлечение 1-го столбца матрицы С, 2-го столбца  матрицы D, команда Ctrl+6), задание выполнить при двух  значениях переменной ORIGIN: 0, 1,
# C^-1, D^-1 (обратные матрицы, -1 задается как степень),
# С*C^-1, D*D^-1 (произведения матриц),
# stack(p,q) ,  augment(p,q)
# stack(C,D) ,  augment(C,D)  (операции соединения матриц)
#
# 3.4. Задать матрицу размером 3х3 в символьном виде:
# a  b  c
# d  e  f
# g  h  k
# Применить к этой матрице операции из меню
# Symbolic/Matrix Operations/
# Transpose Matrixs (транспонирование),
# Invert Matrix (обратная матрица),
# Determinant of Matrix (определитель матрицы).
# Найти произведение заданной матрицы на обратную ей.
# Примеры выполнения заданий
#
# Построение графиков функций
# 1.  Построить график функции одной переменной, увеличить его, нанести координатную сетку
x := 1, 1.1 .. 5
# x - ранжированная (или дискретная) переменная  изменяется с шагом 0,1 от 1 до 5 (начальное, конечное значения и шаг изменения выбираются в зависимости от конкретного вида функции)
a := 2  # Некоторый параметр
f(x) := x^3 + a*x  # Определяем функцию (функции) от одной переменной x
g(x) := 10*x + a
# Для создания шаблона графика:
# Выбрать в меню Graphics пункт Create X-Y plot  (Insert / Graph /  X-Y Plot - для  MathCAD 7) для вызова шаблона графика. Заполнить поля ввода шаблона.
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# Для нанесения координатной сетки:
# Активизировать график, щелкнув по нему.
# В пункте меню X-Y Plot  выбрать команду
# Format и заполнить поля No. of Grids (число линий сетки) для осей X, Y на вкладке X-Y Axes
# 2  Построить график функции двух переменных (интервал и шаг изменения аргументов подобрать самостоятельно исходя из конкретного вида функции)
ORIGIN := 0  # Определяем индекс, с которого начинают нумероваться столбцы и строки в массивах или элементы векторов.
N_x := 21
N_y := 21  # Задаем числа точек по осям x и y
x_нач := -4/10
x_кон := 4/10
# Задаем начальное и конечное значение изменения аргумента x и вычисляем шаг по оси х
Δx := (x_кон - x_нач)/N_x
y_нач := -4/10
y_кон := 4/10  # Задаем начальное и конечное значение изменения аргумента y и вычисляем шаг  по оси y
Δy := (y_кон - y_нач)/N_y
i := 0 .. N_x - 1
j := 0 .. N_y - 1
# Задаем координаты точек по осям  x и y, которые содержатся в компонентах векторов X и Y (при этом используются вспомогательные дискретные переменные i, j)
X[i] := x_нач + Δx*i
Y[j] := y_нач + Δy*j
f(x, y) := sin(x^2 - y^2)  # Определяем функцию двух переменных  x  и  y
M[i, j] := f(X[i], Y[j])  # Заполняем матрицу М значениями f(x,y).
# График поверхности (Surface plot)
# Для создания трехмерного графика (графика поверхности):
# Войти в меню Graphics / Create surface plot (Insert / Graph /  Surface Plot - для  MathCAD 7) для вызова шаблона графика, напечатать М в поле ввода и щелкнуть вне графической области или нажать клавишу F9
# [component: inputs M]
# Трехмерная гистограмма (3D Bar Chart)
# Для создания трехмерной гистограммы
# Войти в меню Graphics / Create 3D Bar Chart (Insert / Graph /  3D Bar Chart - для  MathCAD 7) для вызова шаблона графика, напечатать М в поле ввода и щелкнуть вне графической области или нажать F9
# [component: inputs M]
