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/BATCH
/COM,ANSYS RELEASE 2022 R1           BUILD 22.1      UP20211129       20:40:19
/input,menust,tmp,''
/GST,ON
/PLO,INFO,3
/GRO,CURL,ON
/CPLANE,1
WPSTYLE,,,,,,,,0
/INPUT,'apdl','inp','D:\University\6sem\KSKR\CourseAnsys\',, 0
ANTYPE,7
SEOPT,file,3,1,0,0
LUMPM,0
m,all,all
/output,mydetail
/STATUS,SOLU
SOLVE
/output
FINISH
! /EXIT,ALL
