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/batch
! ANSYS input file written by Workbench version 2022 R1
! File used for geometry attach: D:\University\6sem\KSKR\CourseAnsys\My Detail_files\dp0\SYS\DM\SYS.agdb
/title,My Detail--Static Structural (A5)
/com,--- Data in consistent MKS units. See Solving Units in the help system for more information.
/units,MKS
/prep7
! Turn off shape checking because checks already performed inside WB mesher.
! See help system for more information.
SHPP,OFF,,NOWARN
etcon,set             ! allow ANSYS to choose best KEYOP's for 180x elements, resets any applicable keyopt to MAPDL defaults
/com,*********** Nodes for the whole assembly ***********
nblock,3,,448
(1i9,3e20.9e3)
        1    -1.500064285E-01     9.999024497E-02     0.000000000E+00
        2    -1.500064285E-01    -1.000097550E-01     0.000000000E+00
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-1
/com,*********** Elements for Body 1 "Solid" ***********
et,1,185
eblock,19,solid,,984
(19i9)
        1        1        1        1        0        0        0        0        8        0        1       81      408       82       82      360      360      360      360
        1        1        1        1        0        0        0        0        8        0        2       81      408      311      311      146      146      146      146
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-1
/com,*********** Send User Defined Coordinate System(s) ***********
csys,0
toffst,273.15,  ! Temperature offset from absolute zero
/com,*********** Set Reference Temperature ***********
tref,22.
/com,*********** Send Materials ***********
Temperature = 'TEMP' ! Temperature
MP,DENS,1,7850,	! kg m^-3
MP,ALPX,1,1.2e-05,	! C^-1
MP,C,1,434,	! J kg^-1 C^-1
MP,KXX,1,60.5,	! W m^-1 C^-1
MP,RSVX,1,1.7e-07,	! kg m^3 A^-2 s^-3
MP,EX,1,200000000000,	! Pa
MP,NUXY,1,0.3,
MP,MURX,1,10000,

!************************* Model Summary ********************
!Solid,	Structural Steel 2,	matid,	1
!************************* End Model Summary ********************
CMBLOCK,FORCE   ,NODE,       14
(8i10)
       168       169       170       171       172       173       174       263
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CMBLOCK,FIXED_SUPPORT,NODE,       24
(8i10)
       120       121       122       123       124       125       132       133
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
CMBLOCK,SELECTION,NODE,      408
(8i10)
         1         2         3         4         5         6         7         8
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
CMBLOCK,SELECTION_2,ELEM,      984
(8i10)
         1         2         3         4         5         6         7         8
         9        10        11        12        13        14        15        16
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
/com,*********** Fixed Supports ***********
CMBLOCK,_FIXEDSU,NODE,       24
(8i10)
       120       121       122       123       124       125       132       133
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
cmsel,s,_FIXEDSU
d,all,all
nsel,all
/com,*********** Create Direct FE , Forces ****
CMBLOCK,_CM94F  ,NODE,       14
(8i10)
       168       169       170       171       172       173       174       263
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fini
/com,****************************************************************************
/com,*************************    SOLUTION       ********************************
/com,****************************************************************************
/solu
antype,0                   ! static analysis
_thickRatio=  0     ! Ratio of thick parts in the model
eqsl,sparse,,,,,1
cntr,print,1               ! print out contact info and also make no initial contact an error
dmpoption,emat,no             ! Don't combine emat file for DANSYS
dmpoption,esav,no             ! Don't combine esav file for DANSYS
nldiag,cont,iter           ! print out contact info each equilibrium iteration
rescontrol,,none                 ! Do not keep any restart files
/com,****************************************************
/com,******************* SOLVE FOR LS 1 OF 1 ****************
/com,**** Set Direct FE , Forces ****
f,_CM94F,fx,0.
f,_CM94F,fy,0.
f,_CM94F,fz,-7.14285714285714
nsub,1,1,1
time,1.
outres,erase
outres,all,none
outres,nsol,all,
outres,rsol,all
outres,eangl,all
outres,etmp,all
outres,veng,all
outres,strs,all,
outres,epel,all,
outres,eppl,all,
outres,cont,all,
! *********** WB SOLVE COMMAND ***********
! check interactive state
*get,ANSINTER_,active,,int
*if,ANSINTER_,ne,0,then
/eof
*endif
solve
/com *************** Write FE CONNECTORS *********
CEWRITE,file,ce,,INTE
/com,****************************************************
/com,*************** FINISHED SOLVE FOR LS 1 *************
/post1
fini
