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/batch
! ANSYS input file written by Workbench version 2022 R1
! File used for geometry attach: D:\University\6sem\KSKR\lab3\3lab_files\dp0\SYS\DM\SYS.agdb
/title,3lab--Steady-State Thermal (B5)
/com,--- Data in consistent MKS units. See Solving Units in the help system for more information.
/units,MKS
/prep7
! Turn off shape checking because checks already performed inside WB mesher.
! See help system for more information.
SHPP,OFF,,NOWARN
etcon,set             ! allow ANSYS to choose best KEYOP's for 180x elements, resets any applicable keyopt to MAPDL defaults
/com,*********** Nodes for the whole assembly ***********
nblock,3,,773
(1i9,3e20.9e3)
        1     5.212246187E-02     6.383160609E-18     4.000000000E-01
        2     4.761623828E-02     2.120011517E-02     4.000000000E-01
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-1
/com,*********** Elements for Body 1 "Solid" ***********
et,1,278
eblock,19,solid,,527
(19i9)
        1        1        1        1        0        0        0        0        8        0      519      251      352      334      334      337      337      337      337
        1        1        1        1        0        0        0        0        8        0      520      251      352      324      324      334      334      334      334
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-1
/com,*********** Elements for Body 2 "Solid" ***********
et,2,278
eblock,19,solid,,523
(19i9)
        2        2        2        2        0        0        0        0        8        0     1046      514      528      517      517      518      518      518      518
        2        2        2        2        0        0        0        0        8        0     1047      494      528      517      517      514      514      514      514
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-1
/com,*********** Elements for Body 3 "Solid" ***********
et,3,278
eblock,19,solid,,518
(19i9)
        1        3        3        3        0        0        0        0        8        0     1569      601      607      703      703      685      685      685      685
        1        3        3        3        0        0        0        0        8        0     1570      589      607      703      703      601      601      601      601
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-1
/com,*********** Elements for Body 4 "Solid" ***********
et,4,278
eblock,19,solid,,518
(19i9)
        2        4        4        4        0        0        0        0        8        0        1       73       79      175      175      157      157      157      157
        2        4        4        4        0        0        0        0        8        0        2       61       79      175      175       73       73       73       73
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-1
/com,*********** Send User Defined Coordinate System(s) ***********
csys,0
toffst,273.15,  ! Temperature offset from absolute zero
/com,*********** Send Materials ***********
Temperature = 'TEMP' ! Temperature
MP,DENS,1,8300,	! kg m^-3
MP,ALPX,1,1.8e-05,	! C^-1
MP,C,1,385,	! J kg^-1 C^-1
MP,KXX,1,401,	! W m^-1 C^-1
MPTEMP,,,,,,,,
MPTEMP,1,0
MPTEMP,2,20
MPTEMP,3,100
MPDATA,RSVX,1, ,1.548e-08,1.694e-08,2.277e-08,	! kg m^3 A^-2 s^-3
MPTEMP,,,,,,,,
MP,EX,1,110000000000,	! Pa
MP,NUXY,1,0.34,
MP,MURX,1,1,

Temperature = 'TEMP' ! Temperature
MP,DENS,2,903.4,	! kg m^-3
MP,EX,2,1461000000,	! Pa
MP,NUXY,2,0.4087,
MP,ALPX,2,9.909e-05,	! C^-1
MP,KXX,2,0.209,	! W m^-1 C^-1
MP,C,2,1600,	! J kg^-1 C^-1

!************************* Model Summary ********************
!Solid,	Copper Alloy,	matid,	1
!Solid,	Plastic, PP (homopolymer, low flow),	matid,	2
!Solid,	Copper Alloy,	matid,	1
!Solid,	Plastic, PP (homopolymer, low flow),	matid,	2
!************************* End Model Summary ********************
/com,*********** Create Contact "Contact Region" ***********
*set,tid,6
*set,cid,5
r,tid
r,cid
et,tid,170
et,cid,174
eblock,10,,,17
(15i9)
     3229        6        6        6        0      192      317      193      193
     3230        6        6        6        0      191      317      192      192
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-1
eblock,10,,,17
(15i9)
     3246        5        5        5        0      192      317      193      193
     3247        5        5        5        0      191      317      192      192
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-1
eblock,10,,,17
(15i9)
     3263        5        6        5        0       26       27      142      142
     3264        5        6        5        0       17       18      143      143
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-1
eblock,10,,,17
(15i9)
     3280        6        5        6        0       26       27      142      142
     3281        6        5        6        0       17       18      143      143
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-1
keyo,cid,8,2               ! auto create asymmetric contact (from Program Controlled setting)
keyo,cid,10,0              ! adjust contact stiffness each NR iteration (from Program Controlled setting)
keyo,cid,12,5              ! bonded always
keyo,cid,18,1              ! small sliding turned on by application
keyo,cid,2,0               ! augmented Lagrange (from Program Controlled setting)
keyo,cid,4,0               ! on Gauss point (from Program Controlled setting)
keyo,cid,9,1               ! ignore initial gaps/penetration
keyo,cid,7,0               ! No Prediction
rmod,tid,3,10.      ! FKN
rmod,tid,5,0.       ! ICONT
rmod,tid,6,0.       ! PINB
rmod,tid,10,0.      ! CNOF
rmod,tid,12,0.      ! FKT
rmod,tid,36,35      ! WB DSID
rmod,cid,3,10.      ! FKN
rmod,cid,5,0.       ! ICONT
rmod,cid,6,0.       ! PINB
rmod,cid,10,0.      ! CNOF
rmod,cid,12,0.      ! FKT
rmod,cid,36,35      ! WB DSID
*set,_maxkxx,4010000.
rmod,cid,14,_maxkxx/_ASMDIAG         ! TCC, Divide by Length since Traction Based
rmod,tid,14,_maxkxx/_ASMDIAG      ! TCC, Divide by Length since Traction Based
keyo,cid,1,2     ! Pure thermal contact
/com,*********** Create Contact "Contact Region 2" ***********
*set,tid,8
*set,cid,7
r,tid
r,cid
et,tid,170
et,cid,174
eblock,10,,,17
(15i9)
     3297        8        8        8        0      378      379      494      494
     3298        8        8        8        0      369      370      495      495
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-1
eblock,10,,,17
(15i9)
     3314        7        7        7        0      378      379      494      494
     3315        7        7        7        0      369      370      495      495
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-1
eblock,10,,,17
(15i9)
     3331        7        8        7        0      539      672      540      540
     3332        7        8        7        0      538      672      539      539
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-1
eblock,10,,,17
(15i9)
     3348        8        7        8        0      539      672      540      540
     3349        8        7        8        0      538      672      539      539
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-1
keyo,cid,8,2               ! auto create asymmetric contact (from Program Controlled setting)
keyo,cid,10,0              ! adjust contact stiffness each NR iteration (from Program Controlled setting)
keyo,cid,12,5              ! bonded always
keyo,cid,18,1              ! small sliding turned on by application
keyo,cid,2,0               ! augmented Lagrange (from Program Controlled setting)
keyo,cid,4,0               ! on Gauss point (from Program Controlled setting)
keyo,cid,9,1               ! ignore initial gaps/penetration
keyo,cid,7,0               ! No Prediction
rmod,tid,3,10.      ! FKN
rmod,tid,5,0.       ! ICONT
rmod,tid,6,0.       ! PINB
rmod,tid,10,0.      ! CNOF
rmod,tid,12,0.      ! FKT
rmod,tid,36,38      ! WB DSID
rmod,cid,3,10.      ! FKN
rmod,cid,5,0.       ! ICONT
rmod,cid,6,0.       ! PINB
rmod,cid,10,0.      ! CNOF
rmod,cid,12,0.      ! FKT
rmod,cid,36,38      ! WB DSID
*set,_maxkxx,4010000.
rmod,cid,14,_maxkxx/_ASMDIAG         ! TCC, Divide by Length since Traction Based
rmod,tid,14,_maxkxx/_ASMDIAG      ! TCC, Divide by Length since Traction Based
keyo,cid,1,2     ! Pure thermal contact
/com,*********** Create Contact "Contact Region 3" ***********
*set,tid,10
*set,cid,9
r,tid
r,cid
et,tid,170
et,cid,174
eblock,10,,,17
(15i9)
     3365       10       10       10        0      554      555      670      670
     3366       10       10       10        0      545      546      671      671
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-1
eblock,10,,,17
(15i9)
     3382        9        9        9        0      554      555      670      670
     3383        9        9        9        0      545      546      671      671
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-1
eblock,10,,,17
(15i9)
     3399        9       10        9        0       11      144       12       12
     3400        9       10        9        0       10      144       11       11
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-1
eblock,10,,,17
(15i9)
     3416       10        9       10        0       11      144       12       12
     3417       10        9       10        0       10      144       11       11
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-1
keyo,cid,8,2               ! auto create asymmetric contact (from Program Controlled setting)
keyo,cid,10,0              ! adjust contact stiffness each NR iteration (from Program Controlled setting)
keyo,cid,12,5              ! bonded always
keyo,cid,18,1              ! small sliding turned on by application
keyo,cid,2,0               ! augmented Lagrange (from Program Controlled setting)
keyo,cid,4,0               ! on Gauss point (from Program Controlled setting)
keyo,cid,9,1               ! ignore initial gaps/penetration
keyo,cid,7,0               ! No Prediction
rmod,tid,3,10.      ! FKN
rmod,tid,5,0.       ! ICONT
rmod,tid,6,0.       ! PINB
rmod,tid,10,0.      ! CNOF
rmod,tid,12,0.      ! FKT
rmod,tid,36,41      ! WB DSID
rmod,cid,3,10.      ! FKN
rmod,cid,5,0.       ! ICONT
rmod,cid,6,0.       ! PINB
rmod,cid,10,0.      ! CNOF
rmod,cid,12,0.      ! FKT
rmod,cid,36,41      ! WB DSID
*set,_maxkxx,4010000.
rmod,cid,14,_maxkxx/_ASMDIAG         ! TCC, Divide by Length since Traction Based
rmod,tid,14,_maxkxx/_ASMDIAG      ! TCC, Divide by Length since Traction Based
keyo,cid,1,2     ! Pure thermal contact
nsel,all
esel,all
/com,*********** Define Temperature Constraint ***********
CMBLOCK,_CM78   ,NODE,       30
(8i10)
       176       177       178       179       180       181       182       183
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/com,*********** Define Temperature Constraint ***********
CMBLOCK,_CM80   ,NODE,       15
(8i10)
       176       177       178       179       180       181       182       183
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fcum,add                   ! add nodal forces up (needed in case have loads on the same edge,vertex)
fcum                       ! reset default on fcum command since done sending WB F loads
/com,***************** Define Uniform Initial temperature ***************
tunif,22.
fini
/com,****************************************************************************
/com,*************************    SOLUTION       ********************************
/com,****************************************************************************
/solu
antype,0                   ! static analysis
!eqsl,sparse               ! using sparse solver which is default so no eqsl command needed
cntr,print,1               ! print out contact info and also make no initial contact an error
rescontrol,,none                 ! Do not keep any restart files
dmpoption,emat,no             ! Don't combine emat file for DANSYS
dmpoption,esav,no             ! Don't combine esav file for DANSYS
/com,****************************************************
/com,******************* SOLVE FOR LS 1 OF 1 ****************
d,_CM78,temp,220.
d,_CM80,temp,100.
autots,on
nsub,1,10,1
time,1.
outres,erase
outres,all,none
outres,nsol,all
outres,rsol,all
outres,eangl,all
outres,veng,all
outres,fflux,all
outres,cont,all
cnvtol,heat,,.001,,1.e-006    ! Program Controlled. Set MINREF equivalent of 1e-6 Watts
! *********** WB SOLVE COMMAND ***********
! check interactive state
*get,ANSINTER_,active,,int
*if,ANSINTER_,ne,0,then
/eof
*endif
solve
/com *************** Write FE CONNECTORS *********
CEWRITE,file,ce,,INTE
/com,****************************************************
/com,*************** FINISHED SOLVE FOR LS 1 *************
/post1
fini
